<Lems
      xmlns="http://www.neuroml.org/lems/0.7.4"
      xmlns:xsi="http://www.w3.org/2001/XMLSchema-instance"
      xsi:schemaLocation="http://www.neuroml.org/lems/0.7.4 ../../LEMS/Schemas/LEMS/LEMS_v0.7.4.xsd"
      description="Rate based/population models translated using LEMS.">

    <ComponentType name="MontbrioT"
                   description="2D model describing the Ott-Antonsen reduction of infinitely all-to-all coupled QIF neurons (Theta-neurons)."
                   value="">

        <!-- If empty then none -->
        <Constant name="I" domain="lo=-10.0, hi=10.0, step=0.01" default="0.0" description="???"/>
        <Constant name="Delta" domain="lo=0.0, hi=10.0, step=0.01" default="1.0" description="Vertical shift of the configurable nullcline."/>
        <Constant name="alpha" domain="lo=0.0, hi=1.0, step=0.1" default="1.0" description=":math:`\alpha` ratio of effect between long-range and local connectivity."/>
        <Constant name="s" domain="lo=-15.0, hi=15.0, step=0.01" default="0.0" description="QIF membrane reversal potential."/>
        <Constant name="k" domain="lo=-15.0, hi=15.0, step=0.01" default="0.0" description="Switch for the terms specific to Coombes model."/>
        <Constant name="J" domain="lo=-25.0, hi=25.0, step=0.0001" default="15.0" description="Constant parameter to scale the rate of feedback from the slow variable to the firing rate variable."/>
        <Constant name="eta" domain="lo=-10.0, hi=10.0, step=0.0001" default="-5.0" description="Constant parameter to scale the rate of feedback from the firing rate variable to itself"/>
        <Constant name="Gamma" domain="lo=0., hi=10.0, step=0.1" default="0.0" description="Derived from eterogeneous currents and synaptic weights (see Montbrio p.12)."/>
        <Constant name="gamma" domain="lo=-2.0, hi=2.0, step=0.1" default="777" description="Constant parameter to reproduce FHN dynamics where excitatory input currents are negative. It scales both I and the long range coupling term."/>

        <!-- contants used for atlas_data data, must match the data filename -->
        <Constant name="ccr_mha" domain="lo=1.0, hi=2.0, step=3.0" default="66.0" description="cell count/region."/>
        <Constant name="scr_mha" domain="lo=2.0, hi=3.0, step=4.0" default="66.0" description="cell count/region."/>
        <Constant name="fbr_mha" domain="lo=3.0, hi=4.0, step=5.0" default="66.0" description="cell count/region."/>

        <Dynamics>
            <!-- "State variable ranges [lo, hi]" values are entered with keyword "default" -->
            <!-- For each state variable a set of boundaries can be added to encompass the boundaries of the dynamic range -->
            <!-- Leave empty "" for no boundaries. Set None for one-sided boundaries, i.e. "1.0, None" -->
            <StateVariable name="r" default="0., 2.0" boundaries="0.0, inf"/>
            <StateVariable name="V" default="-2.0, 1.5" boundaries=""/>

            <!-- Derived variables can be used to simplify the time derivatives, enter the local coupling formulas or any formula -->
            <!-- syntax: [name]=[expression] -->
            <!-- Define for ex. global and local coupling: c_0 = coupling[0, ] and lc_0 = local_coupling -->
            <DerivedVariable name="Coupling_global" expression="alpha * coupling[0]"/>
            <DerivedVariable name="Coupling_local" expression="(1-alpha) * local_coupling * r"/>
            <DerivedVariable name="Coupling_Term" expression="Coupling_global + Coupling_local"/>

            <!-- For conditionals use &lt(=); or &gt;(=) for less- or greater then (equal to)  -->
            <!-- Conditional used for if statement, syntax: if {condition} -> {cases[0]} else {cases[1]}. Cases are separated by (,) -->
            <TimeDerivative name="dx" expression="Delta / pi + 2 * V * r - k * r**2 + Gamma * r / pi"/>
            <TimeDerivative name="dy" expression="V**2 - pi**2 * r**2 + eta + (k * s + J) * r - k * V * r + gamma * I + Coupling_Term"/>

        </Dynamics>

        <!-- Exposures are used for observables, for the name enter variable to be observed (usually states)
        and for dimension enter the reduction functionality. Will be represented as variables_of_interest.
        Choices and default list with a (,) separator-->
        <Exposure name="r" choices="r, V" default="r, V" description="The quantities of interest for monitoring for the Infinite QIF 2D oscillator."/>

    </ComponentType>
</Lems>
